// COMSOL Multiphysics 5.0.1.276 model "5_Layer_SC_with_substrate.mph"
// Outline of the model tree

Parameters
  mu_FM_perc = 100
  mu_SC = 0.01
  mu_Sub = 100
  R0 = 0.25[in]
  R1 = 0.5[in]
  n = 5
  dR = (R1-R0)/n
  f_SC = 0.5
  dR_SC = dR*f_SC
  dR_sub = dR-dR_SC
  Rworld = 6[in]
  R2 = 0.75[in]
  mu_FM = mu_FM_perc/100*mu_FM_ideal
  mu_FM_ideal = (R2^2+R1^2)/(R2^2-R1^2)
  B0 = 500[mT]

Selections
  sel1: Explicit "Infinite Element Domain" on domains 1
  com1: Complement "Analysis Domains" | input = {sel1}

Coordinate systems
  ie1: InfiniteElement "Infinite Element Domain 1" on selection sel1 | ScalingType = Cylindrical

Geometry
  geom1 "Geometry 1" (2D, length unit mm)
    c1: Circle "World" | r = Rworld
    sc1: SubsequenceCall | argexpr = {R0, R0+dR, dR_SC}
    sc2: SubsequenceCall | argexpr = {R0+dR, R0+dR*2, dR_SC}
    sc3: SubsequenceCall | argexpr = {R0+dR*2, R0+dR*3, dR_SC}
    sc4: SubsequenceCall | argexpr = {R0+dR*3, R0+dR*4, dR_SC}
    sc5: SubsequenceCall | argexpr = {R0+dR*4, R0+dR*5, dR_SC}
    c2: Circle "FM" | r = R2
    uni1: Union "SC" | contributeto = csel1; input = sc1(1), sc2(1), sc3(1), sc4(1), sc5(1)
    uni2: Union "Sub" | contributeto = csel2; input = sc1(2), sc2(2), sc3(2), sc4(2), sc5(2)
    c3: Circle "Infinite" | r = 2*Rworld
    fin: Finalize "Form Union"
  sub1 "Layer" (2D, length unit mm)
    c1: Circle | r = R0
    c2: Circle | r = R0+dR_SC
    c3: Circle | r = R1
    copy1: Copy | input = c2
    dif1: Difference | contributeto = csel2; input = c2; input2 = c1
    dif2: Difference | contributeto = csel1; input = c3; input2 = copy1

Materials
  mat1: Common "Air" on all domains
    def "Basic"
      relpermeability = 1
      relpermittivity = 1
      dynamicviscosity = eta(T[1/K])[Pa*s]
      ratioofspecificheat = 1.4
      electricconductivity = 0[S/m]
      heatcapacity = Cp(T[1/K])[J/(kg*K)]
      density = rho(pA[1/Pa],T[1/K])[kg/m^3]
      thermalconductivity = k(T[1/K])[W/(m*K)]
      soundspeed = cs(T[1/K])[m/s]
      eta: Piecewise | arg = T; extrap = constant; pieces = {200.0, 1600.0, -8.38278E-7+8.35717342E-8*T^1-7.69429583E-11*T^2+4.6437266E-14*T^3-1.06585607E-17*T^4}
      Cp: Piecewise | arg = T; extrap = constant; pieces = {200.0, 1600.0, 1047.63657-0.372589265*T^1+9.45304214E-4*T^2-6.02409443E-7*T^3+1.2858961E-10*T^4}
      rho: Analytic | expr = pA*0.02897/8.314/T; args = {pA, T}; dermethod = manual; argders = {{pA, d(pA*0.02897/8.314/T,pA)}, {T, d(pA*0.02897/8.314/T,T)}}
      k: Piecewise | arg = T; extrap = constant; pieces = {200.0, 1600.0, -0.00227583562+1.15480022E-4*T^1-7.90252856E-8*T^2+4.11702505E-11*T^3-7.43864331E-15*T^4}
      cs: Analytic | expr = sqrt(1.4*287*T); args = T; dermethod = manual; argders = {T, d(sqrt(1.4*287*T),T)}
    RefractiveIndex
      n = 1
      ki = 0
  mat2: Common "Ferromagnet (from Iron)" on domains 3, 7
    def "Basic"
      relpermeability = mu_FM
      electricconductivity = 1.12e7[S/m]
      thermalexpansioncoefficient = 12.2e-6[1/K]
      heatcapacity = 440[J/(kg*K)]
      relpermittivity = 1
      density = 7870[kg/m^3]
      thermalconductivity = 76.2[W/(m*K)]
    Enu "Young's modulus and Poisson's ratio"
      youngsmodulus = 200e9[Pa]
      poissonsratio = 0.29
  mat3: Common "Superconductor (from Copper)" on selection geom1_csel1_dom
    def "Basic"
      relpermeability = mu_SC
      electricconductivity = 5.998e7[S/m]
      heatcapacity = 385[J/(kg*K)]
      relpermittivity = 1
      emissivity = 0.5
      density = 8700[kg/m^3]
      thermalconductivity = 400[W/(m*K)]
    linzRes "Linearized resistivity"
      rho0 = 1.72e-8[ohm*m]
      alpha = 3.9e-3[1/K]
      Tref = 273.15[K]
  mat4: Common "Nickle (from Iron)" on selection geom1_csel2_dom
    def "Basic"
      relpermeability = mu_Sub
      electricconductivity = 1.12e7[S/m]
      thermalexpansioncoefficient = 12.2e-6[1/K]
      heatcapacity = 440[J/(kg*K)]
      relpermittivity = 1
      density = 7870[kg/m^3]
      thermalconductivity = 76.2[W/(m*K)]
    Enu "Young's modulus and Poisson's ratio"
      youngsmodulus = 200e9[Pa]
      poissonsratio = 0.29

Physics
  mfnc: MagnetostaticsNoCurrents "Magnetic Fields, No Currents" on all domains
    dependent variable Vm
    BackgroundField.SolveFor = ReducedField
    BackgroundField.Hb = {0, B0/mu0_const, 0}
    mfc1: MagneticFluxConservation (default)
    mi1: MagneticInsulation (default)
    init1: init "Initial Values 1" (default)
    zsp1: ZeroMagneticScalarPotential on points 16

Mesh
  mesh1 "Mesh 1" (physics-controlled)
    size: MeshSizeDefault | hauto = 5

Studies
  std1 "Study 1"
    stat: Stationary

Solver configurations
  sol1 "Solution 1" (study std1)
    v1: Variables "Dependent Variables 1"
    s1: Stationary "Stationary Solver 1"
      dDef: Direct
      fc1: FullyCoupled | linsolver = dDef

Datasets
  dset1: Solution | solution = sol1
  cln1: CutLine2D | data = dset1; genpoints = {{-R2*3, 0}, {R2*3, 0}}

Plots
  pg1: PlotGroup2D "Magnetic Flux Density Norm (mfnc)" | data = dset1
    surf1: Surface | expr = mfnc.normB; unit = mT
  pg2: PlotGroup1D "1D Plot Group 2" | data = cln1
    lngr1: LineGraph | expr = mfnc.By; unit = mT; xdata = expr; xdataexpr = x